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/BATCH
/COM,ANSYS RELEASE 2020 R2           BUILD 20.2      UP20200601       02:05:03
/TITLE,Bracket
SAVE
FINISH
! /EXIT,ALL
/BATCH
/COM,ANSYS RELEASE 2020 R2           BUILD 20.2      UP20200601       02:05:42
/input,menust,tmp,''
/COM,ANSYS RELEASE 2020 R2           BUILD 20.2      UP20200601       02:05:42
/GST,ON
/PLO,INFO,3
/GRO,CURL,ON
/CPLANE,1
WPSTYLE,,,,,,,,0
/SOLU
FINISH
/PREP7
ET,1,PLANE183
ET,2,PLANE183
ETDEL,2
KEYOPT,1,1,0
KEYOPT,1,3,3
KEYOPT,1,6,0
R,1,0.125,
MPTEMP,,,,,,,,
MPTEMP,1,0
MPDATA,EX,1,,29e6
MPDATA,PRXY,1,,0.3
SAVE
SAVE
SAVE
wpstyle,1.0,1.0,0,12,0.003,0,0,,5
WPSTYLE,,,,,,,,1
BLC4,0,1,0,0
BLC4,0,1,0,0
BLC4,0,1,0,0
BLC4,0,12,4,2
/BATCH
/COM,ANSYS RELEASE 2020 R2           BUILD 20.2      UP20200601       02:17:30
/input,menust,tmp,''
/COM,ANSYS RELEASE 2020 R2           BUILD 20.2      UP20200601       02:17:30
/GST,ON
/PLO,INFO,3
/GRO,CURL,ON
/CPLANE,1
WPSTYLE,,,,,,,,0
wpstyle,1.0,1.0,0,12,0.003,0,0,,5
WPSTYLE,,,,,,,,1
SAVE
SAVE
/SOLU
FINISH
/PREP7
BLC4,0,12,4,-2
BLC4,4,12,7,-2
CYL4,11,11,1, ,1
CYL4,0,10,0,0,4,-90
FLST,2,3,5,ORDE,3
FITEM,2,1
FITEM,2,-2
FITEM,2,4
AGLUE,P51X
LFILLT,18,17,0.5, ,
LPLOT
FLST,2,3,4
FITEM,2,7
FITEM,2,5
FITEM,2,8
AL,P51X
FLST,2,5,5,ORDE,4
FITEM,2,1
FITEM,2,-3
FITEM,2,5
FITEM,2,-6
AADD,P51X
wpstyle,0.25,1,0,12,0.003,0,0,,5
CYL4,11,11,0.25
ASBA,       1,       1
FLST,2,2,5,ORDE,2
FITEM,2,1
FITEM,2,4
FLST,3,2,5,ORDE,2
FITEM,3,1
FITEM,3,4
ASBA,P51X,P51X
ASBA,       4,       1
WPSTYLE,,,,,,,,0
SAVE
ESIZE,0.25,0,
SAVE
MSHKEY,0
CM,_Y,AREA
ASEL, , , ,       2
CM,_Y1,AREA
CHKMSH,'AREA'
CMSEL,S,_Y
AMESH,_Y1
CMDELE,_Y
CMDELE,_Y1
CMDELE,_Y2
FINISH
/SOL
FLST,2,3,3,ORDE,3
FITEM,2,1
FITEM,2,4
FITEM,2,13
/GO
DK,P51X, ,0, ,1,ALL, , , , , ,
FLST,2,2,4,ORDE,2
FITEM,2,3
FITEM,2,13
/GO
SFL,P51X,PRES,10,
/STATUS,SOLU
SOLVE
FINISH
/POST26
FILE,'Bracket','rst','.'
NUMVAR,200
SOLU,191,NCMIT
STORE,MERGE
FILLDATA,191,,,,1,1
REALVAR,191,191
FINISH
/POST1
PLDISP,1
/EFACET,1
PLNSOL, S,EQV, 0,1.0
/EFACET,1
PLNSOL, S,EQV, 0,1.0
/EFACET,1
PLNSOL, S,1, 0,1.0
! outres,all
! OUTRES, ALL, ALL
SAVE
FINISH
! /EXIT,ALL
